# Разрешение таймеров 0 и 2 (чтобы хватало на 3 канала) - максимальное значение скважности = 255
FGEN := 7680000
A := 255
# Восстанавливаем 180 точками 1/2 периода
f := 50
N := 180
N*2*50 = 18000
# Каждые
1000/(2*N*f) = 0.0555556  # мс задаем новую скважность
1000/(2*N*100) = 0.0277778
1000/(2*N*1) = 2.77778
FGEN/(2*N*f) = 426.667
# Формулы расчета каждого шага
# x - номер шага | n - значение скважности в данной точке
2*N*50 = 18000
x := 0, 1 .. N
n_A(x) := round(A*sin(π/2*x/N))
n_B(x) := round(A*sin(π/2*x/N + 2*π/3))
n_C(x) := round(A*sin(π/2*x/N + 4*π/3))
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round(A*sin(π/2*x/(0.5*N))) = [
    0; 4; 9; 13; 18; 22; 27; 31; 35; 40
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]
(1*sin(π/2*x/(0.5*N))) = [
    0; 0.0174524; 0.0348995; 0.052336; 0.0697565; 0.0871557; 0.104528; 0.121869; 0.139173; 0.156434
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]
1*sin(π/2*x/(0.5*N)) float, 3 → [
    0.0; 0.0175; 0.0349; 0.0523; 0.0698; 0.0872; 0.105; 0.122; 0.139; 0.156
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]
